#echo screen

log none

units		lj
atom_style	full

#######dielectric = 1/(bjurrem_length * KbT), previously 0.8333############
dielectric	0.35014

read_data	data.polymer2

change_box	all boundary p p p
group		polymer molecule == 1

neighbor	10.0 bin

#velocity all create 1.0 698052 dist gaussian

thermo 10000
thermo_style multi

#######Interaction Parameters##########
pair_style	lj/cut/coul/debye 10.0 2.5 0.5
pair_coeff	* * 1.00 1.00
pair_modify	shift yes

#######Bonds###########################
special_bonds	fene
bond_style	fene
bond_coeff    1 30 2 1.0 1.0
#######Interaction Parameters##########

minimize 1e-6 1e-4 10000 100000

#########Set up system#################
fix	1 all nve
fix	2 all langevin 1.0 1.0 1.0 188801
########################################


#######Run simulation###########################
thermo_style    custom step temp etotal ke pe epair ebond evdwl ecoul
timestep	0.005
neigh_modify delay 0 every 1 check yes

############# RUN CONTROLLED BY LOOP IN THE MAIN CODE ###################
